<?xml version="1.0"?>
<!-- Generated by Aero-Matic v 1.1

     Inputs:
                horsepower: 2550.0
                     pitch: variable
            max engine rpm: 15100
        prop diameter (ft): 9.843

     Outputs:
              max prop rpm: 1906.23
                gear ratio:    7.92
                       Cp0: 0.199060
                       Ct0: 0.463809
       static thrust (lbs): 10449.79
-->

<propeller name="an24_prop">
  <ixx>  7.355 </ixx>
  <diameter unit="M">   3.9 </diameter>
  <numblades> 4 </numblades>
  <gearratio> 12.11341 </gearratio>
  <constspeed> 1 </constspeed>
  <p_factor>   9.33 </p_factor>
  <minpitch> 19 </minpitch> <!-- was 8 -->
  <maxpitch> 92.5 </maxpitch>
  <reversepitch> 8 </reversepitch>
  <minrpm>   1240 </minrpm>
  <maxrpm>   1250 </maxrpm>

 <!-- thrust coefficient as a function of advance ratio and blade angle -->
  <table name="C_THRUST" type="internal">
      <tableData>
                -10        0         15        25        35        45        55        65       90
      -0.2      -0.2263    0.1275    0.4638    0.5682    0.6261    0.6609    0.6090    0.5218   0.0000
       0.0      -0.3363    0.0000    0.4638    0.5682    0.6261    0.6670    0.6234    0.5218   0.0000
       0.2      -0.3771   -0.1160    0.4003    0.5566    0.6173    0.6670    0.6234    0.5218   0.0000
       0.4      -0.3771   -0.2695    0.3015    0.5510    0.6057    0.6609    0.6234    0.5218   0.0000
       0.6      -0.3771   -0.3771    0.1596    0.4958    0.5798    0.6438    0.6145    0.5218   0.0000
       0.8      -0.3771   -0.3771    0.0088    0.3710    0.5626    0.6206    0.6145    0.5218   0.0000
       1.0      -0.3771   -0.3771   -0.1507    0.2263    0.5394    0.5886    0.6090    0.5218   0.0000
       1.2      -0.3771   -0.3771   -0.3103    0.0696    0.4434    0.5682    0.6090    0.5218   0.0000
       1.4      -0.3771   -0.3771   -0.3771   -0.1016    0.3191    0.5594    0.5974    0.5218   0.0000
       1.6      -0.3771   -0.3771   -0.3771   -0.2579    0.1739    0.5394    0.5858    0.5218   0.0000
       1.8      -0.3771   -0.3771   -0.3771   -0.3771    0.0292    0.4638    0.5682    0.5218   0.0000
       2.0      -0.3771   -0.3771   -0.3771   -0.3771   -0.1160    0.3622    0.5658    0.5218   0.0000
       2.2      -0.3771   -0.3771   -0.3771   -0.3771   -0.2611    0.2611    0.5566    0.5218   0.0000
       2.4      -0.3771   -0.3771   -0.3771   -0.3771   -0.3771    0.1391    0.4545    0.5218   0.0000
       2.6      -0.3771   -0.3771   -0.3771   -0.3771   -0.3771    0.0176    0.2876    0.4638   0.0000
       2.8      -0.3771   -0.3771   -0.3771   -0.3771   -0.3771   -0.1044    0.1883    0.3771   0.0000
       3.0      -0.3771   -0.3771   -0.3771   -0.3771   -0.3771   -0.2263    0.0988    0.2899   0.0000
       3.2      -0.3771   -0.3771   -0.3771   -0.3771   -0.3771   -0.3479    0.0088    0.2031   0.0000
       3.4      -0.3771   -0.3771   -0.3771   -0.3771   -0.3771   -0.3771   -0.0812    0.1160   0.0000
       3.6      -0.3771   -0.3771   -0.3771   -0.3771   -0.3771   -0.3771   -0.1711    0.0292   0.0000
       3.8      -0.3771   -0.3771   -0.3771   -0.3771   -0.3771   -0.3771   -0.2611   -0.0580   0.0000
       4.0      -0.3771   -0.3771   -0.3771   -0.3771   -0.3771   -0.3771   -0.3506   -0.1452   0.0000
       6.0      -0.3771   -0.3771   -0.3771   -0.3771   -0.3771   -0.3771   -0.3771   -0.3771   0.0000
      </tableData>
  </table>

 <!-- power coefficient as a function of advance ratio and blade angle -->
  <table name="C_POWER" type="internal">
     <tableData>
               -10        0        15        25        35        45        55        65       90
      -0.2      0.0332   0.0663    0.2323    0.5275    0.9097    1.2939    1.4929    1.6522   1.6522
       0.0      0.1328   0.0332    0.1991    0.4917    0.8699    1.2939    1.4989    1.6522   1.6522
       0.2      0.1891   0.0531    0.1925    0.4578    0.8321    1.2939    1.4989    1.6522   1.6522
       0.4      0.2548   0.1161    0.1658    0.4220    0.7903    1.2939    1.4989    1.6522   1.6522
       0.6      0.3125   0.1758    0.1095    0.3921    0.7405    1.2680    1.4929    1.6522   1.6522
       0.8      0.3683   0.2355    0.0332    0.3324    0.6967    1.2103    1.4929    1.6522   1.6522
       1.0      0.4240   0.2926    0.0332    0.2329    0.6569    1.1486    1.4870    1.6522   1.6522
       1.2      0.4817   0.2339   -0.1095    0.0896    0.5813    1.1008    1.4770    1.6522   1.6522
       1.4      0.5375   0.4041   -0.1652   -0.0663    0.4479    1.0849    1.4591    1.6522   1.6522
       1.6      0.5932   0.4618   -0.1931   -0.1991    0.2827    1.0550    1.4273    1.5925   1.6522
       1.8      0.6509   0.5176   -0.1991   -0.3324    0.0830    0.9356    1.3835    1.5586   1.6522
       2.0      0.7067   0.5733   -0.2548   -0.4638   -0.0995    0.7962    1.3178    1.5268   1.6522
       2.2      0.7624   0.6310   -0.3125   -0.5972   -0.2986    0.6469    1.2780    1.4591   1.6522
       2.4      0.8201   0.6868   -0.3683   -0.7305   -0.4976    0.4618    1.2401    1.4273   1.6522
       2.6      0.8759   0.7425   -0.4240   -0.8619   -0.6310    0.1931    1.2103    1.3775   1.6522
       2.8      0.9316   0.8002   -0.4817   -0.9953   -0.7564   -0.0657    1.1844    1.3596   1.6522
       3.0      0.9893   0.8560   -0.5375   -1.1287   -0.8958   -0.2986    1.1446    1.3596   1.6522
       3.2      1.0451   0.9117   -0.5932   -1.2600   -1.0291   -0.5315    1.0709    1.3277   1.6522
       3.4      1.1008   0.9694   -0.6509   -1.3934   -1.1605   -0.7624    0.8301    1.2939   1.6522
       3.6      1.1585   1.0252   -0.7067   -1.5268   -1.2939   -0.9953    0.5832    1.2600   1.6522
       3.8      1.2143   1.0809   -0.7624   -1.6522   -1.4273   -1.2282    0.3245    1.2202   1.6522
       4.0      1.2700   1.1386   -0.8201   -1.6522   -1.6522   -1.4591    0.0657    1.1287   1.6522
       6.0      1.6522   1.6522   -1.6522   -1.6522   -1.6522   -1.6522   -1.6522   -0.9953   1.6522
     </tableData>
  </table>

<!-- thrust effects of helical tip Mach -->
<table name="CT_MACH" type="internal">
  <tableData>
    0.85   1.0
    1.05   0.8
  </tableData>
</table>

<!-- power-required effects of helical tip Mach -->
<table name="CP_MACH" type="internal">
  <tableData>
    0.85   1.0
    1.05   1.8
    2.00   1.4
  </tableData>
</table>

</propeller>
