<?xml version="1.0"?>
<!-- Generated by Aero-Matic v 1.1

     Inputs:
                horsepower: 2550.0
                     pitch: variable
            max engine rpm: 15100
        prop diameter (ft): 9.843

     Outputs:
              max prop rpm: 1906.23
                gear ratio:    7.92
                       Cp0: 0.199060
                       Ct0: 0.463809
       static thrust (lbs): 10449.79
-->

<propeller name="an24_prop">
  <ixx>  7.355 </ixx>
  <diameter unit="M">   3.9 </diameter>
  <numblades> 4 </numblades>
  <gearratio> 12.11341 </gearratio>
  <constspeed> 0 </constspeed>
  <p_factor>   9.33 </p_factor>
  <minpitch> 8 </minpitch>
  <maxpitch> 92.5 </maxpitch>
  <minrpm>   1240 </minrpm>
  <maxrpm>   1250 </maxrpm>
  <ct_factor> 1.281 </ct_factor>
  <cp_factor> 1 </cp_factor>
 <!-- thrust coefficient as a function of advance ratio and blade angle -->
  <table name="C_THRUST" type="internal">
      <tableData>
	8	13	16	19	22	25	28	31	34	37	40	43	46	49	92.5
0	0.0156	0.1304	0.1457	0.1561	0.1631	0.1657	0.1698	0.173	0.175	0.1766	0.1776	0.1755	0.1699	0.158	0
0.1	0.0078  0.1218	0.1392	0.1524	0.1614	0.1651	0.1693	0.1729	0.1749	0.1762	0.1773	0.1752	0.1706	0.159	0
0.2	0	0.1098	0.1294	0.1464	0.1581	0.1632	0.1681	0.1717	0.1738	0.1758	0.1769	0.175	0.1712	0.1599	0
0.3	0.0555	0.093	0.1176	0.1373	0.1526	0.1601	0.1657	0.17	0.1721	0.174	0.1748	0.1736	0.1705	0.1601	0
0.4	0.031	0.0726	0.1008	0.1265	0.144	0.1558	0.1631	0.1668	0.1697	0.1717	0.1723	0.1716	0.1699	0.1603	0
0.5	0.0012	0.0523	0.0804	0.1107	0.1333	0.1502	0.1586	0.1633	0.1665	0.1685	0.1695	0.1688	0.1685	0.1599	0
0.6	-0.0297	0.0264	0.0599	0.0909	0.1191	0.141	0.1523	0.1587	0.1629	0.1652	0.1658	0.1658	0.1659	0.1596	0
0.7	-0.0606	-0.0022	0.0369	0.0709	0.1008	0.128	0.1442	0.1528	0.1579	0.162	0.1622	0.1645	0.1624	0.1595	0
0.8	-0.0914	-0.0309	0.0081	0.0478	0.0786	0.1102	0.1328	0.1457	0.1528	0.1586	0.1585	0.1609	0.1586	0.1565	0
0.9	-0.1223	-0.0595	-0.0207	0.0219	0.0562	0.0895	0.1192	0.1361	0.1463	0.1543	0.1547	0.1559	0.1554	0.1526	0
1	-0.1532	-0.0881	-0.0495	-0.0114	0.0304	0.0669	0.1004	0.1248	0.1387	0.1488	0.152	0.1509	0.1522	0.1522	0
1.1	-0.184	-0.1167	-0.0784	-0.0448	0.0046	0.0432	0.0773	0.1087	0.1289	0.1413	0.1497	0.148	0.149	0.1488	0
1.2	-0.2149	-0.1454	-0.1072	-0.0781	-0.0212	0.0169	0.054	0.0878	0.1153	0.1326	0.145	0.1455	0.1457	0.1456	0
1.3	-0.2458	-0.174	-0.136	-0.1115	-0.047	-0.0095	0.028	0.0667	0.0989	0.1218	0.1382	0.1431	0.1433	0.1431	0
1.4	-0.2767	-0.2026	-0.1648	-0.1448	-0.0728	-0.0358	0.0019	0.0432	0.0783	0.1087	0.1308	0.1404	0.1409	0.1405	0
1.5	-0.3075	-0.2313	-0.1936	-0.1782	-0.0986	-0.0622	-0.0242	0.0166	0.0578	0.0924	0.1198	0.1354	0.1396	0.138	0
1.6	-0.3384	-0.2599	-0.2225	-0.2115	-0.1244	-0.0885	-0.0502	-0.0101	0.0342	0.0735	0.1065	0.1287	0.1375	0.1356	0
1.7	-0.3693	-0.2885	-0.2513	-0.2449	-0.1502	-0.1149	-0.0763	-0.0368	0.0088	0.0529	0.0916	0.12	0.1361	0.1356	0
1.8	-0.4001	-0.3171	-0.2801	-0.2782	-0.176	-0.1413	-0.1023	-0.0635	-0.0166	0.0305	0.0739	0.1092	0.1312	0.1365	0
1.9	-0.431	-0.3458	-0.3089	-0.3116	-0.2018	-0.1676	-0.1284	-0.0902	-0.0421	0.008	0.0559	0.0946	0.1235	0.1356	0
2	-0.4619	-0.3744	-0.3377	-0.3449	-0.2276	-0.194	-0.1545	-0.1168	-0.0675	-0.0145	0.0325	0.0776	0.1132	0.1321	0
2.1	-0.4928	-0.403	-0.3665	-0.3783	-0.2534	-0.2203	-0.1805	-0.1435	-0.0929	-0.037	0.0092	0.0605	0.1012	0.125	0
2.2	-0.5236	-0.4316	-0.3954	-0.4116	-0.2792	-0.2467	-0.2066	-0.1702	-0.1183	-0.0595	-0.0142	0.0395	0.0849	0.1162	0
2.3	-0.5545	-0.4603	-0.4242	-0.445	-0.305	-0.2731	-0.2327	-0.1969	-0.1438	-0.082	-0.0376	0.0123	0.0682	0.1042	0
2.4	-0.5854	-0.4889	-0.453	-0.4783	-0.3308	-0.2994	-0.2587	-0.2236	-0.1692	-0.1045	-0.0609	-0.0149	0.0476	0.0903	0
2.5	-0.6163	-0.5175	-0.4818	-0.5117	-0.3566	-0.3258	-0.2848	-0.2502	-0.1946	-0.127	-0.0843	-0.0421	0.024	0.0743	0
2.6	-0.6471	-0.5461	-0.5106	-0.545	-0.3824	-0.3521	-0.3108	-0.2769	-0.22	-0.1495	-0.1077	-0.0693	-0.0024	0.0582	0
2.7	-0.678	-0.5748	-0.5395	-0.5784	-0.4082	-0.3785	-0.3369	-0.3036	-0.2454	-0.172	-0.131	-0.0965	-0.0288	0.0383	0
2.8	-0.7089	-0.6034	-0.5683	-0.6117	-0.434	-0.4049	-0.363	-0.3303	-0.2709	-0.1945	-0.1544	-0.1237	-0.0552	0.0175	0
2.9	-0.7397	-0.632	-0.5971	-0.6451	-0.4598	-0.4312	-0.389	-0.3569	-0.2963	-0.217	-0.1778	-0.1509	-0.0816	-0.0034	0
3	-0.7706	-0.6606	-0.6259	-0.6784	-0.4856	-0.4576	-0.4151	-0.3836	-0.3217	-0.2395	-0.2011	-0.1781	-0.108	-0.0243	0
      </tableData>
  </table>

 <!-- power coefficient as a function of advance ratio and blade angle -->
  <table name="C_POWER" type="internal">
     <tableData>
	8	13	16	19	22	25	28	31	34	37	40	43	46	49	92.5
0	0.0392	0.0494	0.0723	0.0998	0.1271	0.1621	0.1994	0.2366	0.2769	0.3134	0.3498	0.3863	0.4175	0.4562	1
0.1	0.0412	0.0516	0.0712	0.0951	0.1223	0.1563	0.1928	0.2319	0.2711	0.3108	0.3477	0.3856	0.4194	0.4588	1
0.2	0.0432	0.0518	0.0703	0.0922	0.1189	0.1512	0.1874	0.2266	0.2653	0.3082	0.3456	0.3844	0.4192	0.4595	1
0.3	0.0416	0.0497	0.0698	0.0916	0.1161	0.1467	0.1824	0.221	0.2595	0.3023	0.3417	0.3822	0.4189	0.4592	1
0.4	0.0207	0.0436	0.0658	0.09	0.1153	0.1437	0.1775	0.2149	0.2532	0.2961	0.3377	0.3789	0.4167	0.4573	1
0.5	0.0103	0.0354	0.0591	0.0849	0.1111	0.1395	0.1725	0.2088	0.2455	0.2897	0.3332	0.3751	0.4146	0.4557	1
0.6	-0.0042	0.0231	0.0486	0.0762	0.1046	0.1338	0.1662	0.201	0.2369	0.2817	0.3285	0.3707	0.4115	0.4537	1
0.7	-0.0187	0.0084	0.0348	0.064	0.0947	0.1262	0.1582	0.1932	0.2289	0.2733	0.3215	0.3656	0.4074	0.45	1
0.8	-0.0332	-0.0074	0.0175	0.0474	0.0816	0.1157	0.1493	0.1847	0.2209	0.2643	0.3141	0.3591	0.4024	0.4463	1
0.9	-0.0476	-0.0232	-0.001	0.0275	0.0655	0.1017	0.1379	0.1757	0.212	0.2553	0.3051	0.3525	0.3975	0.4418	1
1	-0.0621	-0.039	-0.0195	0.0046	0.0431	0.0834	0.1229	0.1641	0.2023	0.2463	0.2961	0.3446	0.3918	0.4362	1
1.1	-0.0766	-0.0548	-0.038	-0.0183	0.0149	0.0609	0.1049	0.1503	0.1911	0.2369	0.2871	0.3367	0.3851	0.4306	1
1.2	-0.091	-0.0706	-0.0565	-0.0412	-0.0133	0.0336	0.0813	0.1341	0.1788	0.2252	0.2772	0.3283	0.3777	0.4248	1
1.3	-0.1055	-0.0863	-0.075	-0.0641	-0.0416	0.0006	0.052	0.11	0.1616	0.2128	0.2662	0.3196	0.3701	0.4187	1
1.4	-0.12	-0.1021	-0.0935	-0.087	-0.0698	-0.0325	0.0199	0.082	0.139	0.1967	0.2542	0.3097	0.3623	0.4121	1
1.5	-0.1345	-0.1179	-0.112	-0.1099	-0.098	-0.0655	-0.0149	0.0489	0.1117	0.1749	0.2392	0.3023	0.3566	0.4063	1
1.6	-0.1489	-0.1337	-0.1305	-0.1328	-0.1263	-0.0985	-0.0497	0.0111	0.0797	0.1491	0.2204	0.2918	0.352	0.4028	1
1.7	-0.1634	-0.1495	-0.149	-0.1557	-0.1545	-0.1315	-0.0845	-0.0267	0.0417	0.1181	0.1974	0.2754	0.3453	0.4006	1
1.8	-0.1779	-0.1653	-0.1674	-0.1786	-0.1827	-0.1645	-0.1193	-0.0644	0.003	0.0835	0.169	0.2556	0.3349	0.3961	1
1.9	-0.1923	-0.181	-0.1859	-0.2015	-0.2109	-0.1976	-0.1541	-0.1022	-0.0357	0.0456	0.1394	0.232	0.3203	0.3888	1
2	-0.2068	-0.1968	-0.2044	-0.2244	-0.2392	-0.2306	-0.1889	-0.1399	-0.0745	0.0078	0.1045	0.2035	0.3017	0.379	1
2.1	-0.2213	-0.2126	-0.2229	-0.2473	-0.2674	-0.2636	-0.2236	-0.1777	-0.1132	-0.0301	0.065	0.1708	0.2808	0.3641	1
2.2	-0.2357	-0.2284	-0.2414	-0.2702	-0.2956	-0.2966	-0.2584	-0.2154	-0.1519	-0.0679	0.0223	0.1351	0.2526	0.3464	1
2.3	-0.2502	-0.2442	-0.2599	-0.2931	-0.3239	-0.3296	-0.2932	-0.2532	-0.1906	-0.1057	-0.0203	0.0949	0.2205	0.3269	1
2.4	-0.2647	-0.2599	-0.2784	-0.316	-0.3521	-0.3627	-0.328	-0.2909	-0.2294	-0.1436	-0.063	0.0493	0.1854	0.303	1
2.5	-0.2792	-0.2757	-0.2969	-0.3389	-0.3803	-0.3957	-0.3628	-0.3287	-0.2681	-0.1814	-0.1057	-0.0003	0.1404	0.2738	1
2.6	-0.2936	-0.2915	-0.3154	-0.3618	-0.4085	-0.4287	-0.3976	-0.3664	-0.3068	-0.2193	-0.1483	-0.0499	0.0923	0.2387	1
2.7	-0.3081	-0.3073	-0.3339	-0.3847	-0.4368	-0.4617	-0.4324	-0.4042	-0.3456	-0.2571	-0.191	-0.0995	0.04	0.2004	1
2.8	-0.3226	-0.3231	-0.3524	-0.4076	-0.465	-0.4947	-0.4672	-0.4419	-0.3843	-0.2949	-0.2337	-0.1491	-0.0128	0.1549	1
2.9	-0.337	-0.3389	-0.3709	-0.4305	-0.4932	-0.5278	-0.5019	-0.4797	-0.423	-0.3328	-0.2763	-0.1986	-0.0655	0.1054	1
3	-0.3515	-0.3546	-0.3894	-0.4534	-0.5215	-0.5608	-0.5367	-0.5174	-0.4617	-0.3706	-0.319	-0.2482	-0.1182	0.0516	1
     </tableData>
  </table>

<!-- thrust effects of helical tip Mach -->
<table name="CT_MACH" type="internal">
  <tableData>
    0.85   1.0
    1.05   0.8
  </tableData>
</table>

<!-- power-required effects of helical tip Mach -->
<table name="CP_MACH" type="internal">
  <tableData>
    0.85   1.0
    1.05   1.8
    2.00   1.4
  </tableData>
</table>

</propeller>
