<?xml version="1.0"?>
<!-- Generated by Aero-Matic v 1.1

     Inputs:
                horsepower: 2550.0
                     pitch: variable
            max engine rpm: 15100
        prop diameter (ft): 9.843

     Outputs:
              max prop rpm: 1906.23
                gear ratio:    7.92
                       Cp0: 0.199060
                       Ct0: 0.463809
       static thrust (lbs): 10449.79
-->

<propeller name="prop_AV72">
  <ixx>  73.579 </ixx> <!-- real value -->
  <diameter unit="M">   3.9 </diameter>
  <numblades> 4 </numblades>
  <gearratio> 12.11341 </gearratio>
  <constspeed> 0 </constspeed>
  <p_factor>   0.33 </p_factor>
  <minpitch> 8 </minpitch>
  <maxpitch> 92.5 </maxpitch>
  <minrpm>   1240 </minrpm>
  <maxrpm>   1250 </maxrpm>
  <ct_factor> 0.5999 </ct_factor>
  <cp_factor> 0.4 </cp_factor>

 <!-- thrust coefficient as a function of advance ratio and blade angle -->
  <table name="C_THRUST" type="internal">
      <tableData>
                -10        0         15        25        35        45        55        65       90
      -0.2      -0.1339    0.0755    0.2744    0.3362    0.3705    0.3911    0.3603    0.3087   0.0000
       0.0      -0.1990    0.0000    0.2744    0.3362    0.3705    0.3946    0.3689    0.3087   0.0000
       0.2      -0.2231   -0.0686    0.2368    0.3293    0.3653    0.3946    0.3689    0.3087   0.0000
       0.4      -0.2231   -0.1595    0.1784    0.3260    0.3584    0.3911    0.3689    0.3087   0.0000
       0.6      -0.2231   -0.2231    0.0944    0.2934    0.3431    0.3809    0.3636    0.3087   0.0000
       0.8      -0.2231   -0.2231    0.0052    0.2196    0.3329    0.3672    0.3636    0.3087   0.0000
       1.0      -0.2231   -0.2231   -0.0892    0.1339    0.3192    0.3483    0.3603    0.3087   0.0000
       1.2      -0.2231   -0.2231   -0.1836    0.0412    0.2624    0.3362    0.3603    0.3087   0.0000
       1.4      -0.2231   -0.2231   -0.2231   -0.0601    0.1888    0.3310    0.3535    0.3087   0.0000
       1.6      -0.2231   -0.2231   -0.2231   -0.1526    0.1029    0.3192    0.3466    0.3087   0.0000
       1.8      -0.2231   -0.2231   -0.2231   -0.2231    0.0173    0.2744    0.3362    0.3087   0.0000
       2.0      -0.2231   -0.2231   -0.2231   -0.2231   -0.0686    0.2143    0.3348    0.3087   0.0000
       2.2      -0.2231   -0.2231   -0.2231   -0.2231   -0.1545    0.1545    0.3293    0.3087   0.0000
       2.4      -0.2231   -0.2231   -0.2231   -0.2231   -0.2231    0.0823    0.2690    0.3087   0.0000
       2.6      -0.2231   -0.2231   -0.2231   -0.2231   -0.2231    0.0104    0.1702    0.2744   0.0000
       2.8      -0.2231   -0.2231   -0.2231   -0.2231   -0.2231   -0.0617    0.1114    0.2231   0.0000
       3.0      -0.2231   -0.2231   -0.2231   -0.2231   -0.2231   -0.1339    0.0585    0.1715   0.0000
       3.2      -0.2231   -0.2231   -0.2231   -0.2231   -0.2231   -0.2058    0.0052    0.1202   0.0000
       3.4      -0.2231   -0.2231   -0.2231   -0.2231   -0.2231   -0.2231   -0.0480    0.0686   0.0000
       3.6      -0.2231   -0.2231   -0.2231   -0.2231   -0.2231   -0.2231   -0.1013    0.0173   0.0000
       3.8      -0.2231   -0.2231   -0.2231   -0.2231   -0.2231   -0.2231   -0.1545   -0.0343   0.0000
       4.0      -0.2231   -0.2231   -0.2231   -0.2231   -0.2231   -0.2231   -0.2075   -0.0859   0.0000
       6.0      -0.2231   -0.2231   -0.2231   -0.2231   -0.2231   -0.2231   -0.2231   -0.2231   0.0000
      </tableData>
  </table>

 <!-- power coefficient as a function of advance ratio and blade angle -->
  <table name="C_POWER" type="internal">
     <tableData>
               -10        0        15        25        35        45        55        65       90
      -0.2      0.0197   0.0392    0.1375    0.3121    0.5383    0.7656    0.8834    0.9776   0.9776
       0.0      0.0786   0.0197    0.1178    0.2909    0.5147    0.7656    0.8869    0.9776   0.9776
       0.2      0.1119   0.0314    0.1139    0.2709    0.4923    0.7656    0.8869    0.9776   0.9776
       0.4      0.1508   0.0687    0.0981    0.2497    0.4676    0.7656    0.8869    0.9776   0.9776
       0.6      0.1849   0.1040    0.0648    0.2320    0.4382    0.7503    0.8834    0.9776   0.9776
       0.8      0.2179   0.1393    0.0197    0.1967    0.4123    0.7161    0.8834    0.9776   0.9776
       1.0      0.2509   0.1731    0.0197    0.1378    0.3887    0.6796    0.8799    0.9776   0.9776
       1.2      0.2850   0.1384   -0.0648    0.0530    0.3439    0.6514    0.8740    0.9776   0.9776
       1.4      0.3180   0.2391   -0.0978   -0.0392    0.2650    0.6419    0.8634    0.9776   0.9776
       1.6      0.3510   0.2733   -0.1143   -0.1178    0.1673    0.6243    0.8445    0.9423   0.9776
       1.8      0.3852   0.3062   -0.1178   -0.1967    0.0491    0.5536    0.8186    0.9223   0.9776
       2.0      0.4181   0.3392   -0.1508   -0.2744   -0.0589    0.4711    0.7797    0.9034   0.9776
       2.2      0.4511   0.3734   -0.1849   -0.3534   -0.1767    0.3828    0.7562    0.8634   0.9776
       2.4      0.4853   0.4064   -0.2179   -0.4323   -0.2945    0.2733    0.7338    0.8445   0.9776
       2.6      0.5183   0.4393   -0.2509   -0.5100   -0.3734    0.1143    0.7161    0.8151   0.9776
       2.8      0.5512   0.4735   -0.2850   -0.5889   -0.4476   -0.0389    0.7008    0.8045   0.9776
       3.0      0.5854   0.5065   -0.3180   -0.6679   -0.5300   -0.1767    0.6773    0.8045   0.9776
       3.2      0.6184   0.5395   -0.3510   -0.7456   -0.6090   -0.3145    0.6337    0.7856   0.9776
       3.4      0.6514   0.5736   -0.3852   -0.8245   -0.6867   -0.4511    0.4912    0.7656   0.9776
       3.6      0.6855   0.6066   -0.4181   -0.9034   -0.7656   -0.5889    0.3451    0.7456   0.9776
       3.8      0.7185   0.6396   -0.4511   -0.9776   -0.8445   -0.7267    0.1920    0.7220   0.9776
       4.0      0.7515   0.6737   -0.4853   -0.9776   -0.9776   -0.8634    0.0389    0.6679   0.9776
       6.0      0.9776   0.9776   -0.9776   -0.9776   -0.9776   -0.9776   -0.9776   -0.5889   0.9776
     </tableData>
  </table>

<!-- thrust effects of helical tip Mach -->
<table name="CT_MACH" type="internal">
  <tableData>
    0.85   1.0
    1.05   0.8
  </tableData>
</table>

<!-- power-required effects of helical tip Mach -->
<table name="CP_MACH" type="internal">
  <tableData>
    0.85   1.0
    1.05   1.8
    2.00   1.4
  </tableData>
</table>

</propeller>
