<?xml version="1.0"?>
<?xml-stylesheet href="JSBSim.xsl" type="application/xml"?>
<fdm_config name="an24" version="2.0" release="ALPHA">

    <fileheader>
        <author> Aeromatic v 0.95 </author>
        <filecreationdate> 2013-08-31 </filecreationdate>
        <description>
Models        </description>
        <version> $Revision: 1.15 $ </version>
    </fileheader>

    <metrics>
        <wingarea unit="M2"> 74.98 </wingarea>
        <wingspan unit="M"> 29.2 </wingspan>
        <chord unit="M"> 2.813 </chord>
        <wing_incidence unit="DEG"> 3 </wing_incidence>
        <htailarea unit="M2"> 17.23 </htailarea>
        <htailarm unit="M"> 12.249 </htailarm>
        <vtailarea unit="M2"> 13.28 </vtailarea>
        <vtailarm unit="M"> 11.297 </vtailarm>
        <location name="AERORP" unit="M">
            <x> 8.86337 </x>
            <y> 0 </y>
            <z> 0.73 </z> <!-- 1.392 -->
        </location>
        <location name="EYEPOINT" unit="IN">
            <x> 74.11 </x>
            <y> -24 </y>
            <z> 65 </z>
        </location>
        <location name="VRP" unit="M">
            <x> 8.5 </x>
            <y> 0 </y>
            <z> 0 </z>
        </location>
    </metrics>

    <mass_balance>
    <!--    <ixx unit="SLUG*FT2">214809</ixx>
        <iyy unit="SLUG*FT2">166865</iyy>
        <izz unit="SLUG*FT2">377779</izz> -->
        <ixx unit="SLUG*FT2">400000</ixx>
        <iyy unit="SLUG*FT2">250000</iyy>
        <izz unit="SLUG*FT2">500000</izz>
        <ixz unit="KG*M2">0</ixz>
        <iyz unit="KG*M2">0</iyz>
        <ixy unit="KG*M2">0</ixy>
        <emptywt unit="KG">13250</emptywt>
        <location name="CG" unit="M">
            <x>9.446</x>
            <y>0</y>
            <z>0.73</z>
        </location>
        <pointmass name="2 pilots">
            <weight unit="KG">160</weight>
            <location unit="M">
                <x>2.74</x>
                <y>0</y>
                <z>0.38</z>
            </location>
        </pointmass>
        <pointmass name="Cabin crew">
            <weight unit="KG">80</weight>
            <location unit="M">
                <x>16.2</x>
                <y>0</y>
                <z>0.1</z>
            </location>
        </pointmass>
        <pointmass name="Engine oil">
            <weight unit="KG">95</weight>
            <location unit="M">
                <x>6.91</x>
                <y>0</y>
                <z>0.57</z>
            </location>
        </pointmass>
        <pointmass name="Toilet water">
            <weight unit="KG">26</weight>
            <location unit="M">
                <x>15.9</x>
                <y>0</y>
                <z>1.2</z>
            </location>
        </pointmass>
        <pointmass name="Oxygen cistern in cabin">
            <weight unit="KG">3</weight>
            <location unit="M">
                <x>17.2</x>
                <y>0</y>
                <z>0.65</z>
            </location>
        </pointmass>
        <pointmass name="Oxygen cistern in cockpit">
            <weight unit="KG">3</weight>
            <location unit="M">
                <x>3.28</x>
                <y>0</y>
                <z>0.4</z>
            </location>
        </pointmass>
        <pointmass name="Toilet chemicals">
            <weight unit="KG">6</weight>
            <location unit="M">
                <x>16.6</x>
                <y>0</y>
                <z>-0.45</z>
            </location>
        </pointmass>
        <pointmass name="Buffet">
            <weight unit="KG">40</weight>
            <location unit="M">
                <x>16.1</x>
                <y>0</y>
                <z>-0.35</z>
            </location>
        </pointmass>
        <pointmass name="Passangers row 1">
            <weight unit="KG">300</weight>
            <location unit="M">
                <x>6.61</x>
                <y>0</y>
                <z>-0.06</z>
            </location>
        </pointmass>
        <pointmass name="Passangers row 2">
            <weight unit="KG">300</weight>
            <location unit="M">
                <x>7.33</x>
                <y>0</y>
                <z>-0.06</z>
            </location>
        </pointmass>
        <pointmass name="Passangers row 3">
            <weight unit="KG">300</weight>
            <location unit="M">
                <x>8.05</x>
                <y>0</y>
                <z>-0.06</z>
            </location>
        </pointmass>
        <pointmass name="Passangers row 4">
            <weight unit="KG">300</weight>
            <location unit="M">
                <x>8.77</x>
                <y>0</y>
                <z>-0.06</z>
            </location>
        </pointmass>
        <pointmass name="Passangers row 5">
            <weight unit="KG">300</weight>
            <location unit="M">
                <x>9.49</x>
                <y>0</y>
                <z>-0.06</z>
            </location>
        </pointmass>
        <pointmass name="Passangers row 6">
            <weight unit="KG">300</weight>
            <location unit="M">
                <x>10.21</x>
                <y>0</y>
                <z>-0.06</z>
            </location>
        </pointmass>
        <pointmass name="Passangers row 7">
            <weight unit="KG">300</weight>
            <location unit="M">
                <x>10.93</x>
                <y>0</y>
                <z>-0.06</z>
            </location>
        </pointmass>
        <pointmass name="Passangers row 8">
            <weight unit="KG">300</weight>
            <location unit="M">
                <x>11.65</x>
                <y>0</y>
                <z>-0.06</z>
            </location>
        </pointmass>
        <pointmass name="Passangers row 9">
            <weight unit="KG">300</weight>
            <location unit="M">
                <x>12.37</x>
                <y>0</y>
                <z>-0.06</z>
            </location>
        </pointmass>
        <pointmass name="Passangers row 10">
            <weight unit="KG">300</weight>
            <location unit="M">
                <x>13.09</x>
                <y>0</y>
                <z>-0.06</z>
            </location>
        </pointmass>
        <pointmass name="Passangers row 11">
            <weight unit="KG">300</weight>
            <location unit="M">
                <x>13.81</x>
                <y>0</y>
                <z>-0.06</z>
            </location>
        </pointmass>
        <pointmass name="Passangers row 12">
            <weight unit="KG">300</weight>
            <location unit="M">
                <x>14.53</x>
                <y>0</y>
                <z>-0.06</z>
            </location>
        </pointmass>
        <pointmass name="Passangers row 13">
            <weight unit="KG">150</weight>
            <location unit="M">
                <x>15.25</x>
                <y>0</y>
                <z>-0.06</z>
            </location>
        </pointmass>
        <pointmass name="Baggage room 1 left">
            <weight unit="KG">700</weight>
            <location unit="M">
                <x>5.02</x>
                <y>-0.7</y>
                <z>0.3</z>
            </location>
        </pointmass>
        <pointmass name="Baggage room 1 right">
            <weight unit="KG">250</weight>
            <location unit="M">
                <x>5.34</x>
                <y>0.7</y>
                <z>0.3</z>
            </location>
        </pointmass>
        <pointmass name="Baggage room 2">
            <weight unit="KG">260</weight>
            <location unit="M">
                <x>18</x>
                <y>0</y>
                <z>0.4</z>
            </location>
        </pointmass>
        <pointmass name="Baggage room 3">
            <weight unit="KG">0</weight>
            <location unit="M">
                <x>19.28</x>
                <y>0</y>
                <z>0.6</z>
            </location>
        </pointmass>
        <pointmass name="Ballast for gear weight shift">
            <weight unit="KG">500</weight>
            <location unit="M">
                <x>9.446</x>
                <y>0</y>
                <z>0.73</z>
            </location>
        </pointmass>
    </mass_balance>

    <ground_reactions>
        <contact type="BOGEY" name="NOSE">
            <location unit="M">
                <x> 2.42 </x>
                <y> 0 </y>
                <z> -1.91 </z>
            </location>
            <static_friction> 0.8 </static_friction>
            <dynamic_friction> 0.5 </dynamic_friction>
            <rolling_friction> 0.02 </rolling_friction>
            <spring_coeff unit="LBS/FT"> 8000 </spring_coeff>
            <damping_coeff unit="LBS/FT/SEC"> 4000 </damping_coeff>
            <damping_coeff_rebound unit="LBS/FT/SEC">7200</damping_coeff_rebound>
            <max_steer unit="DEG"> 45 </max_steer>
            <brake_group> NONE </brake_group>
            <retractable> 1 </retractable>
        </contact>
        <contact type="BOGEY" name="LEFT_MAIN">
            <location unit="M">
                <x> 10.27 </x>
                <y> -3.95 </y>
                <z> -1.91 </z>
            </location>
            <static_friction> 0.8 </static_friction>
            <dynamic_friction> 0.5 </dynamic_friction>
            <rolling_friction> 0.02 </rolling_friction>
            <spring_coeff unit="LBS/FT"> 27300 </spring_coeff>
            <damping_coeff unit="LBS/FT/SEC"> 5000 </damping_coeff>
            <max_steer unit="DEG"> 0 </max_steer>
            <brake_group> LEFT </brake_group>
            <retractable> 1 </retractable>
        </contact>
        <contact type="BOGEY" name="RIGHT_MAIN">
            <location unit="M">
                <x> 10.27 </x>
                <y> 3.95 </y>
                <z> -1.91 </z>
            </location>
            <static_friction> 0.8 </static_friction>
            <dynamic_friction> 0.5 </dynamic_friction>
            <rolling_friction> 0.02 </rolling_friction>
            <spring_coeff unit="LBS/FT"> 27300 </spring_coeff>
            <damping_coeff unit="LBS/FT/SEC"> 5000 </damping_coeff>
            <max_steer unit="DEG"> 0 </max_steer>
            <brake_group> RIGHT </brake_group>
            <retractable> 1 </retractable>
        </contact>
        <contact type="STRUCTURE" name="LEFT_WING">
            <location unit="M">
                <x> 10.27 </x>
                <y> -14.1 </y>
                <z> 1.214 </z>
            </location>
            <static_friction> 1 </static_friction>
            <dynamic_friction> 1 </dynamic_friction>
            <rolling_friction> 0 </rolling_friction>
            <spring_coeff unit="LBS/FT"> 50000 </spring_coeff>
            <damping_coeff unit="LBS/FT/SEC"> 50000 </damping_coeff>
            <max_steer unit="DEG"> 0 </max_steer>
            <brake_group> NONE </brake_group>
            <retractable> 0 </retractable>
        </contact>
        <contact type="STRUCTURE" name="RIGHT_WING">
            <location unit="M">
                <x> 10.27 </x>
                <y> 14.1 </y>
                <z> 1.214 </z>
            </location>
            <static_friction> 1 </static_friction>
            <dynamic_friction> 1 </dynamic_friction>
            <rolling_friction> 0 </rolling_friction>
            <spring_coeff unit="LBS/FT"> 50000 </spring_coeff>
            <damping_coeff unit="LBS/FT/SEC"> 50000 </damping_coeff>
            <max_steer unit="DEG"> 0 </max_steer>
            <brake_group> NONE </brake_group>
            <retractable> 0 </retractable>
        </contact>
        <contact type="STRUCTURE" name="TAIL">
            <location unit="M">
                <x> 14.1 </x>
                <y> 0 </y>
                <z> -1.05 </z>
            </location>
            <static_friction> 1 </static_friction>
            <dynamic_friction> 1 </dynamic_friction>
            <rolling_friction> 0 </rolling_friction>
            <spring_coeff unit="LBS/FT"> 50000 </spring_coeff>
            <damping_coeff unit="LBS/FT/SEC"> 50000 </damping_coeff>
            <max_steer unit="DEG"> 0 </max_steer>
            <brake_group> NONE </brake_group>
            <retractable> 0 </retractable>
        </contact>
        <contact type="STRUCTURE" name="NOSE">
            <location unit="M">
                <x> 0 </x>
                <y> 0 </y>
                <z> 0 </z>
            </location>
            <static_friction> 1 </static_friction>
            <dynamic_friction> 1 </dynamic_friction>
            <rolling_friction> 0 </rolling_friction>
            <spring_coeff unit="LBS/FT"> 50000 </spring_coeff>
            <damping_coeff unit="LBS/FT/SEC"> 50000 </damping_coeff>
            <max_steer unit="DEG"> 0 </max_steer>
            <brake_group> NONE </brake_group>
            <retractable> 0 </retractable>
        </contact>
    </ground_reactions>

    <propulsion>
        <engine file="ai24">
            <location unit="M">
                <x> 5.94 </x>
                <y> -3.95 </y>
                <z> 1.185 </z>
            </location>
            <orient unit="DEG">
                <roll> 0 </roll>
                <pitch> 0 </pitch>
                <yaw> 0 </yaw>
            </orient>
            <feed>2</feed>
            <feed>1</feed>
            <feed>0</feed>
            <thruster file="prop_av72">
                <sense>-1</sense>
                <location unit="M">
                    <x> 5.94 </x>
                    <y> -3.95 </y>
                    <z> 1.185 </z>
                </location>
                <orient unit="DEG">
                    <roll> 0 </roll>
                    <pitch> 1 </pitch>
                    <yaw> 0 </yaw>
                </orient>
            </thruster>
        </engine>
        <engine file="ai24">
            <location unit="M">
                <x> 5.94 </x>
                <y> 3.95 </y>
                <z> 1.185 </z>
            </location>
            <orient unit="DEG">
                <roll> 0 </roll>
                <pitch> 0 </pitch>
                <yaw> 0 </yaw>
            </orient>
            <feed>3</feed>
            <feed>4</feed>
            <feed>5</feed>
            <thruster file="prop_av72">
                <sense>-1</sense>
              <location unit="M">
                    <x> 5.94 </x>
                    <y> 3.95 </y>
                    <z> 1.185 </z>
                </location>
                <orient unit="DEG">
                    <roll> 0 </roll>
                    <pitch> 1 </pitch>
                    <yaw> 0 </yaw>
                </orient>
            </thruster>
        </engine>
        <tank type="FUEL">
            <location unit="M">
                <x> 9.654 </x>
                <y> -1.4 </y>
                <z> 1.415 </z>
            </location>
            <capacity unit="KG">275</capacity>
            <contents unit="KG">275</contents>
            <priority>2</priority>
        </tank>
        <tank type="FUEL">
            <location unit="M">
                <x> 9.654 </x>
                <y> -3 </y>
                <z> 1.415 </z>
            </location>
            <capacity unit="KG">275</capacity>
            <contents unit="KG">275</contents>
            <priority>2</priority>
        </tank>
        <tank type="FUEL">
            <location unit="M">
                <x> 9.838 </x>
                <y> -7.45 </y>
                <z> 1.474 </z>
            </location>
            <capacity unit="KG">1425</capacity>
            <contents unit="KG">390</contents>
            <priority>1</priority>
        </tank>
        <tank type="FUEL">
            <location unit="M">
                <x> 9.838 </x>
                <y> 7.45 </y>
                <z> 1.474 </z>
            </location>
            <capacity unit="KG">1425</capacity>
            <contents unit="KG">390</contents>
            <priority>1</priority>
        </tank>
        <tank type="FUEL">
            <location unit="M">
                <x> 9.654 </x>
                <y> 3 </y>
                <z> 1.415 </z>
            </location>
            <capacity unit="KG">275</capacity>
            <contents unit="KG">275</contents>
            <priority>2</priority>
        </tank>
        <tank type="FUEL">
            <location unit="M">
                <x> 9.654 </x>
                <y> 1.4 </y>
                <z> 1.415 </z>
            </location>
            <capacity unit="KG">275</capacity>
            <contents unit="KG">275</contents>
            <priority>2</priority>
        </tank>
    </propulsion>

    <flight_control name="FCS: an24">

        <channel name="exhaust thrust left">
          <fcs_function name="aero/function/left-engine-exhaust-thrust">
                <function>
                    <product>
                        <property>propulsion/engine[0]/fuel-flow-rate-pps</property>
                        <value>3.1441</value>
                        <sum>
                          <value>178</value>
                          <product>
                            <value>-0.5144</value>
                            <property>velocities/ve-kts</property>
                          </product>
                        </sum>
                        <value>2.2026</value>
                    </product>
                </function>
                <output> external_reactions/exhaust-thrust-left/magnitude </output>
            </fcs_function>
        </channel>

        <channel name="exhaust thrust right">
          <fcs_function name="aero/function/right-engine-exhaust-thrust">
                <function>
                    <product>
                        <property>propulsion/engine[1]/fuel-flow-rate-pps</property>
                        <value>3.1441</value>
                        <sum>
                          <value>178</value>
                          <product>
                            <value>-0.5144</value>
                            <property>velocities/ve-kts</property>
                          </product>
                        </sum>
                        <value>2.2026</value>
                    </product>
                </function>
                <output> external_reactions/exhaust-thrust-right/magnitude </output>
            </fcs_function>
        </channel>

        <channel name="Pitch">

            <summer name="Pitch Trim Sum">
              <input>fcs/elevator-cmd-norm</input>
              <input>fcs/pitch-trim-cmd-norm</input>
              <clipto>
                <min>-1</min>
                <max>1</max>
              </clipto>
            </summer>

            <aerosurface_scale name="Elevator Control">
              <input>fcs/pitch-trim-sum</input>
              <range>
                <min>-0.52</min>
                <max>0.26</max>
              </range>
              <output>fcs/elevator-pos-rad</output>
            </aerosurface_scale>

            <aerosurface_scale name="elevator normalization">
              <input>fcs/elevator-pos-rad</input>
              <domain>
                <min>-0.52</min>
                <max>0.26</max>
              </domain>
              <range>
                <min>-1</min>
                <max>1</max>
              </range>
              <output>fcs/elevator-pos-norm</output>
            </aerosurface_scale>

        </channel>

        <channel name="Roll">

            <summer name="Roll Trim Sum">
              <input>fcs/aileron-cmd-norm</input>
              <input>fcs/roll-trim-cmd-norm</input>
              <clipto>
                <min>-1</min>
                <max>1</max>
              </clipto>
            </summer>

            <aerosurface_scale name="Left Aileron Control">
              <input>fcs/roll-trim-sum</input>
              <range>
                <min>-0.419</min>
                <max>0.279</max>
              </range>
              <output>fcs/left-aileron-pos-rad</output>
            </aerosurface_scale>

            <aerosurface_scale name="Right Aileron Control">
              <input>fcs/roll-trim-sum</input>
              <range>
                <min>-0.279</min>
                <max>0.419</max>
              </range>
              <output>fcs/right-aileron-pos-rad</output>
            </aerosurface_scale>

            <aerosurface_scale name="left aileron normalization">
              <input>fcs/left-aileron-pos-rad</input>
              <domain>
                <min>-0.419</min>
                <max>0.279</max>
              </domain>
              <range>
                <min>-1</min>
                <max>1</max>
              </range>
              <output>fcs/left-aileron-pos-norm</output>
            </aerosurface_scale>

            <aerosurface_scale name="right aileron normalization">
              <input>fcs/right-aileron-pos-rad</input>
              <domain>
                <min>-0.279</min>
                <max>0.419</max>
              </domain>
              <range>
                <min>-1</min>
                <max>1</max>
              </range>
              <output>fcs/right-aileron-pos-norm</output>
            </aerosurface_scale>

        </channel>

        <channel name="Yaw">

            <summer name="Rudder Command Sum">
              <input>fcs/rudder-cmd-norm</input>
              <input>fcs/yaw-trim-cmd-norm</input>
              <clipto>
                <min>-1</min>
                <max>1</max>
              </clipto>
            </summer>

            <aerosurface_scale name="Rudder Control">
              <input>fcs/rudder-command-sum</input>
              <range>
                <min>-0.436</min>
                <max>0.436</max>
              </range>
              <output>fcs/rudder-pos-rad</output>
            </aerosurface_scale>

            <aerosurface_scale name="rudder normalization">
              <input>fcs/rudder-pos-rad</input>
              <domain>
                <min>-0.436</min>
                <max>0.436</max>
              </domain>
              <range>
                <min>-1</min>
                <max>1</max>
              </range>
              <output>fcs/rudder-pos-norm</output>
            </aerosurface_scale>

        </channel>

        <channel name="Flaps">

            <kinematic name="Flaps Control">
              <input>fcs/flap-cmd-norm</input>
              <traverse>
                <setting>
                  <position>0</position>
                  <time>0</time>
                </setting>
                <setting>
                  <position>38</position>
                  <time>15</time>
                </setting>
              </traverse>
              <output>fcs/flap-pos-deg</output>
            </kinematic>

            <aerosurface_scale name="flap normalization">
              <input>fcs/flap-pos-deg</input>
              <domain>
                <min>0</min>
                <max>38</max>
              </domain>
              <range>
                <min>0</min>
                <max>1</max>
              </range>
              <output>fcs/flap-pos-norm</output>
            </aerosurface_scale>

        </channel>

        <channel name="Landing Gear">

            <kinematic name="Gear Control">
              <input>gear/gear-cmd-norm</input>
              <traverse>
                <setting>
                  <position>0</position>
                  <time>0</time>
                </setting>
                <setting>
                  <position>1</position>
                  <time>5</time>
                </setting>
              </traverse>
              <output>gear/gear-pos-norm</output>
            </kinematic>

        </channel>

        <property>gear/steering</property>
        <property>gear/nose-wheel-steering</property>

        <channel name="Steering">

  <pure_gain name="fcs/steering/slip-error-deg">
   <input>gear/unit[0]/slip-angle-deg</input>
   <gain>0.1</gain>
  </pure_gain>
  <pure_gain name="fcs/steering/center-error-deg">
   <input>fcs/steering/steer-now-pos-deg</input>
   <gain>-0.03</gain>
  </pure_gain>


<summer name="fcs/steering/steer-cmd-castered-deg">
<input>fcs/steering/steer-now-pos-deg</input>
<input>fcs/steering/slip-error-deg</input>
<input>fcs/steering/center-error-deg</input>
   <clipto>
    <min>-45</min>
    <max>45</max>
   </clipto>
<output>fcs/steering/steer-cmd-castered-sum-deg</output>
  </summer>

          <scheduled_gain name="fcs/steer-cmd-norm-switched">
            <input>fcs/steer-cmd-norm</input>
            <table>
              <independentVar> gear/steering </independentVar>
              <tableData>
                10            0.22222
                45            1.0
              </tableData>
            </table>
          </scheduled_gain>

          <kinematic>
              <input>fcs/steer-cmd-norm-switched</input>
              <traverse>
                <setting>
                  <position>-1</position>
                  <time>0</time>
                </setting>
                <setting>
                  <position>1</position>
                  <time>8</time>
                </setting>
              </traverse>
              <output>fcs/steer-cmd-norm-kinematic</output>
            </kinematic>

<fcs_function>
<function>
<sum>
<product>
  <property>fcs/steer-cmd-norm-kinematic</property>
  <property>gear/nose-wheel-steering</property>
</product>
<product>
  <value>0.0222222222222</value>
  <property>fcs/steering/steer-cmd-castered-sum-deg</property>
  <sum>
  <product>
  <property>gear/nose-wheel-steering</property>
  <value>-1</value>
  </product>
  <value>1</value>
  </sum>
</product>
</sum>
</function>
              <output>fcs/steer-cmd-norm-final</output>
</fcs_function>

          <pure_gain>
            <input>fcs/steer-cmd-norm-final</input>
            <gain>45</gain>
            <output>fcs/steer-pos-deg</output>
          </pure_gain>

<fcs_function name="fcs/steering/steer-now-pos-deg">
<function>
<sum>
<product>
  <property>fcs/steer-pos-deg</property>
  <property>gear/nose-wheel-steering</property>
</product>
<product>
  <property>fcs/steering/steer-cmd-castered-sum-deg</property>
  <sum>
  <product>
  <property>gear/nose-wheel-steering</property>
  <value>-1</value>
  </product>
  <value>1</value>
  </sum>
</product>
</sum>
</function>
</fcs_function>

        </channel>

        <channel name="Landing Gear Weight Shift">

          <fcs_function name="aero/function/weight-shift-gears">
                <function>
                  <sum>
                    <product>
                        <property>gear/gear-pos-norm</property>
                        <value>104.34</value>
                    </product>
                    <value>267.55</value>
                  </sum>
                </function>
                <output> inertia/pointmass-location-X-inches[25] </output>
            </fcs_function>

        </channel>

        <channel name="Throttle">

  <switch name="fcs/throttle/min-thr-pos[0]">
   <default value="0"/>
   <test value="0.12">
     fcs/throttle/throttle-pos-norm[0] GE 0.12
     /an24/instrumentation/idle-lock/idle-lock == 0
   </test>
  </switch>

             <fcs_function name="fcs/throttle/throttle-cmd-norm[0]">
                 <function>
                     <product>
                         <property> /controls/engines/engine[0]/throttle </property>
			 <value>1</value>
                     </product>
                 </function>
             </fcs_function>

  <summer name="fcs/throttle/throttle-pos-norm[0]">
<input>fcs/throttle/throttle-cmd-norm[0]</input>
   <clipto>
    <min>fcs/throttle/min-thr-pos[0]</min>
    <max>1</max>
   </clipto>
<output>fcs/throttle-pos-norm[0]</output>
  </summer>

 <switch name="fcs/throttle/min-thr-pos[1]">
   <default value="0"/>
   <test value="0.12">
     fcs/throttle/throttle-pos-norm[1] GE 0.12
     /an24/instrumentation/idle-lock/idle-lock == 0
   </test>
  </switch>

             <fcs_function name="fcs/throttle/throttle-cmd-norm[1]">
                 <function>
                     <product>
                         <property> /controls/engines/engine[1]/throttle </property>
			 <value>1</value>
                     </product>
                 </function>
             </fcs_function>

  <summer name="fcs/throttle/throttle-pos-norm[1]">
<input>fcs/throttle/throttle-cmd-norm[1]</input>
   <clipto>
    <min>fcs/throttle/min-thr-pos[1]</min>
    <max>1</max>
   </clipto>
<output>fcs/throttle-pos-norm[1]</output>
  </summer>

        </channel>

    </flight_control>

    <system file="prop-governor"/>

       <external_reactions>

        <force name="exhaust-thrust-left" frame="BODY">
            <location unit="M">
            <x>  7.5  </x>
            <y>    -4.2 </y>
            <z>    1.185 </z>
            </location>
            <direction>
            <x>    1 </x>
            <y>    0.707 </y>
            <z>    -0.707 </z>
            </direction>
        </force>

        <force name="exhaust-thrust-right" frame="BODY">
            <location unit="M">
            <x>  7.5  </x>
            <y>    4.2 </y>
            <z>    1.185 </z>
            </location>
            <direction>
            <x>    1 </x>
            <y>    -0.707 </y>
            <z>    -0.707 </z>
            </direction>
        </force>

    </external_reactions>

    <aerodynamics>
        <function name="aero/function/alpha-stab-deg">
            <description>Alpha angle at stabilzer due to epsilon</description>
            <table>
                <independentVar lookup="row">aero/alpha-wing-rad</independentVar>
                <independentVar lookup="column">fcs/flap-pos-deg</independentVar>
                <tableData>
	0	15	38
-0.1745	-8.25	-9.05	-11.14
-0.1396	-7.56	-8.56	-10.68
-0.1047	-6.79	-7.92	-10.16
-0.0698	-5.95	-7.26	-9.59
-0.0349	-4.93	-6.57	-9
0	-3.92	-5.78	-8.34
0.0349	-2.84	-4.99	-7.64
0.0698	-1.7	-4.13	-6.86
0.1047	-0.38	-3.17	-6.04
0.1396	1.56	-1.99	-5.07
0.1745	3.15	-0.61	-3.95
0.2094	4.77	2.16	-2.59
0.2443	6.4	3.78	1.64
0.2793	8.02	5.4	3.48
0.3142	9.64	7.02	5.32
0.3491	11.27	8.64	7.16
                </tableData>
            </table>
        </function>
        <function name="aero/function/epsilon-deg">
            <description>Epsilon at stabilizer</description>
<product>
              <sum>
                <property>aero/alpha-wing-rad</property>
		<product>
			<value>-0.017452007</value>
			<property>aero/function/alpha-stab-deg</property>
                </product>
                <value>-0.052356021</value>
	      </sum>
<value>57.3</value>
</product>
        </function>

        <aero_ref_pt_shift_x>
                 <function name="aero/function/aero-ref-shift">
                   <table>
                        <independentVar>fcs/flap-pos-deg</independentVar>
                        <tableData>
                          0             0.50
                          15            0.50
                          38            0.42
                        </tableData>
                    </table>

			<!-- <sum>
                            <product>
                      <property>fcs/mixture-cmd-norm</property>
                      <value>0.21</value>
                       </product>
                    <value>0.42</value>
                    </sum> -->


                </function>
        </aero_ref_pt_shift_x>
        <function name="aero/function/yt0">
            <difference>
                <value>1.467</value>
                <product>
                    <property>inertia/cg-z-in</property>
                    <value>0.0254</value>
                </product>
                <product>
                    <value>0.0524</value>
                    <difference>
                        <product>
                            <property>inertia/cg-x-in</property>
                            <value>0.0254</value>
                        </product>
                        <value>8.866</value>
                    </difference>
                </product>
            </difference>
        </function>
        <function name="aero/function/xt0">
            <sum>
                <difference>
                    <product>
                        <property>inertia/cg-x-in</property>
                        <value>0.0254</value>
                    </product>
                    <value>8.866</value>
                </difference>
                <product>
                    <value>0.0524</value>
                    <property>aero/function/yt0</property>
                </product>
            </sum>
        </function>
        <function name="aero/function/CAX">
            <product>
                <quotient>
                    <property>aero/function/xt0</property>
                    <value>2.813</value>
                </quotient>
                <value>100</value>
            </product>
        </function>
        <function name="aero/function/cmf">
            <description>Mach and flaps parameter</description>
            <sum>
                <property>fcs/flap-pos-deg</property>
                <product>
                    <property>velocities/mach</property>
                    <value>-1</value>
                </product>
            </sum>
        </function>
        <function name="aero/function/cy">
            <description>Lift due to alpha</description>
            <table name="Cy">
                <independentVar lookup="row">aero/alpha-wing-rad</independentVar>
                <independentVar lookup="column">aero/function/cmf</independentVar>
                <tableData>
                               -0.5          -0.15         0             15            38
                  -0.17453      -0.7          -0.7          -0.7          -0.4          0
                  -0.07854      -0.3          -0.3          -0.3          0             0.5
                  -0.00873      0             0             0             0.42          1
                  0.10472       0.71          0.61          0.61          1.1           1.8
                  0.12217       0.8           0.7           0.7           1.21          1.912
                  0.13963       0.89          0.79          0.79          1.32          2.024
                  0.15708       0.95          0.88          0.88          1.42          2.136
                  0.17453       1.03          0.97          0.97          1.51          2.25
                  0.19199       1.07          1.05          1.05          1.6           2.34
                  0.20944       1.11          1.14          1.14          1.68          2.41
                  0.22689       1.13          1.22          1.22          1.76          2.46
                  0.24435       1.1           1.29          1.29          1.82          2.5
                  0.2618        1             1.35          1.35          1.88          2.51
                  0.27925       0.9           1.41          1.41          1.91          2.48
                  0.29671       0.8           1.48          1.48          1.92          2.3
                  0.31416       0.75          1.52          1.52          1.91          2.2
                  0.33161       0.7           1.56          1.56          1.8           2.1
                  0.34907       0.65          1.45          1.45          1.7           2
                  0.36652       0.6           1.3           1.3           1.5           1.8
                  0.43633       0.3           0.3           0.3           0.7           1
                </tableData>
            </table>
        </function>
        <function name="aero/function/cx">
            <description>Drag due to alpha and flaps</description>
            <table name="Cx">
                <independentVar lookup="row">aero/alpha-wing-rad</independentVar>
                <independentVar lookup="column">aero/function/cmf</independentVar>
                <tableData>
		-0.5	-0.15	0	15	38
-0.17453293	0.045	0.037	0.037	0.06	0.1
-0.13962634	0.042	0.034	0.034	0.05	0.1
-0.10471976	0.039	0.03	0.03	0.044	0.1
-0.06981317	0.037	0.028	0.028	0.0398	0.1064
-0.03490659	0.035	0.027	0.027	0.038	0.1163
0		0.0333	0.0256	0.0256	0.0398	0.1293
0.03490659	0.0338	0.0261	0.0261	0.0457	0.1464
0.06981317	0.0388	0.0312	0.0312	0.0553	0.1667
0.10471976	0.0477	0.0369	0.0369	0.0711	0.1891
0.13962634	0.0656	0.0477	0.0477	0.0922	0.2157
0.17453293	0.0937	0.0604	0.0604	0.1157	0.2443
0.20943951	0.1264	0.0777	0.0777	0.1407	0.2782
0.2443461	0.2	0.1007	0.1007	0.1665	0.3101
0.27925268	0.25	0.1314	0.1314	0.187	0.35
0.31415927	0.31	0.166	0.166	0.2099	0.4
0.34906585	0.38	0.22	0.22	0.26	0.47
                </tableData>
            </table>
        </function>
        <function name="aero/function/mz">
            <table name="Mz">
                <independentVar lookup="row">aero/alpha-wing-rad</independentVar>
                <independentVar lookup="column">fcs/flap-pos-deg</independentVar>
                <tableData>
                               0             15            38
                  -0.172436     0.448704      0.435513      0.38739
                  -0.147824     0.408455      0.395294      0.348668
                  -0.140986     0.397274      0.384121      0.337911
                  -0.00608013   0.176665      0.163677      0.125671
                  0.000976808   0.16596       0.152146      0.114569
                  0.0132367     0.147362      0.132112      0.0930775
                  0.046209      0.0973444     0.0847434     0.0352788
                  0.0765166     0.0565805     0.0412023     -0.0178489
                  0.109469      0.0122594     -0.00456033   -0.0756126
                  0.123543      -0.00483209   -0.0241057    -0.100284
                  0.13971       -0.0244656    -0.0465579    -0.130835
                  0.167167      -0.0476138    -0.0846888    -0.182721
                  0.187927      -0.0773428    -0.113518     -0.221949
                  0.241451      -0.153997     -0.181147     -0.323097
                  0.243411      -0.157068     -0.183624     -0.326801
                  0.268276      -0.196021     -0.215042     -0.392682
                  0.282789      -0.218756     -0.233378     -0.436261
                  0.287641      -0.226355     -0.248046     -0.450827
                  0.28962       -0.229457     -0.254033     -0.455172
                  0.30907       -0.271944     -0.312844     -0.497848
                  0.309709      -0.273338     -0.315223     -0.499248
                  0.314445      -0.283688     -0.332889     -0.506354
                  0.330347      -0.338396     -0.392182     -0.530201
                  0.346507      -0.393996     -0.452441     -0.543446
                  0.34682       -0.395071     -0.453606     -0.543702
                  0.347691      -0.398066     -0.456852     -0.544061
                  0.453744      -0.762942     -0.852304     -0.587767
                </tableData>
            </table>
        </function>
        <function name="aero/function/cx_delta_ground">
            <description>Delta Cx due to ground effect</description>
            <table>
                <independentVar lookup="row">aero/function/cy</independentVar>
                <independentVar lookup="column">fcs/flap-pos-deg</independentVar>
                <tableData>
                               0             15            38
                  0             0             0             0
                  0.2           0             -0.0045       -0.0041
                  0.5           0             -0.0129       -0.0124
                  0.8           0             -0.0262       -0.0217
                  1             0             -0.0343       -0.0293
                  1.5           0             -0.0558       -0.0517
                  2             0             -0.0595       -0.0786
                  2.5           0             -0.0595       -0.1189
                  3             0             -0.0595       -0.1189
                </tableData>
            </table>
        </function>
        <function name="aero/function/cy_delta_ground">
            <description>Delta Cy due to ground effect</description>
            <table>
                <independentVar lookup="row">aero/alpha-wing-rad</independentVar>
                <independentVar lookup="column">fcs/flap-pos-deg</independentVar>
                <tableData>
                               0             15            38
                  -0.1047       0             0.04          0.1103
                  -0.0349       0             0.0417        0.1748
                  0.0698        0             0.1399        0.1925
                  0.1047        0             0.1252        0.1576
                  0.1396        0             0.1461        0.0996
                  0.1745        0             0.1556        0.0735
                  0.2443        0             0.166         0.05
                  0.2793        0             0.1328        0.05
                  0.3142        0             0.1017        0.05
                  0.3491        0             0.05          0.05
                </tableData>
            </table>
        </function>
        <function name="aero/function/my">
            <description>my due to beta and rudder angle</description>
            <table>
                <independentVar lookup="row">aero/beta-rad</independentVar>
                <independentVar lookup="column">fcs/rudder-pos-rad</independentVar>
                <tableData>
	-0.436	-0.349	-0.175	0	0.175	0.349	0.436
-0.4414757983	-0.03979	-0.04984	-0.06994	-0.08931	-0.10868	-0.12878	-0.13883
-0.4117633131	-0.03476	-0.04489	-0.06516	-0.0853	-0.10544	-0.12571	-0.13584
-0.3504830578	-0.02167	-0.03288	-0.05531	-0.0753	-0.09529	-0.11772	-0.12893
-0.3099914191	-0.01245	-0.02375	-0.04636	-0.06595	-0.08554	-0.10815	-0.11945
-0.2301548231	0.00445	-0.0045	-0.02239	-0.04432	-0.06625	-0.08414	-0.09309
-0.1835562774	0.01419	0.0057	-0.01127	-0.03243	-0.05359	-0.07056	-0.07905
-0.1229610638	0.02519	0.01741	0.00186	-0.01868	-0.03922	-0.05477	-0.06255
-0.0763509989	0.03217	0.02479	0.01003	-0.0099	-0.02983	-0.04459	-0.05197
-0.0412709282	0.03673	0.02951	0.01508	-0.00435	-0.02378	-0.03821	-0.04543
-0.0009575889	0.04059	0.03354	0.01944	-0.0001	-0.01964	-0.03374	-0.04079
0.0028504892	0.04099	0.03393	0.01981	0.00029	-0.01923	-0.03335	-0.04041
0.0472446666	0.04645	0.0393	0.02501	0.00529	-0.01443	-0.02872	-0.03587
0.1160408333	0.06103	0.05337	0.03805	0.01737	-0.00331	-0.01863	-0.02629
0.1543275975	0.07101	0.06283	0.04648	0.0256	0.00472	-0.01163	-0.01981
0.2229954825	0.09055	0.08169	0.06397	0.04231	0.02065	0.00293	-0.00593
0.2704736742	0.10717	0.09711	0.07698	0.05566	0.03434	0.01421	0.00415
0.3216606905	0.12227	0.11109	0.08872	0.06883	0.04894	0.02657	0.01539
0.3857753606	0.13322	0.12301	0.10259	0.08179	0.06099	0.04057	0.03036
0.4385471358	0.13853	0.12847	0.10835	0.08891	0.06947	0.04935	0.03929
0.4414757983	0.13883	0.12878	0.10868	0.08931	0.06994	0.04984	0.03979
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                </tableData>
            </table>
        </function>
        <function name="aero/function/mx">
		<product>
			<sum>
                      <property>fcs/mixture-cmd-norm</property>
                      <value>-0.5</value>
                    </sum>
                    <value>0.4</value>
			<value>2</value>
		</product>
        </function>
        <axis name="LIFT" unit="LBS">
            <function name="aero/force/Lift_alpha">
                <description>Lift due to alpha</description>
                <product>
                    <property>aero/qbar-psf</property>
                    <property>metrics/Sw-sqft</property>
                    <property>aero/function/cy</property>
                </product>
            </function>
            <function name="aero/force/Lift_elevator">
                <description>Lift due to Elevator Deflection</description>
                <product>
                    <property>aero/qbar-psf</property>
                    <property>metrics/Sw-sqft</property>
                    <property>fcs/elevator-pos-rad</property>
                    <value>0.2</value>
                </product>
            </function>
            <function name="aero/force/Lift_alpha_ground">
                <description>Lift due to alpha and ground effect</description>
                <product>
                    <property>aero/qbar-psf</property>
                    <property>metrics/Sw-sqft</property>
                    <property>aero/function/cy_delta_ground</property>
                    <table>
                        <independentVar>position/h-agl-ft</independentVar>
                        <tableData>
                          0             1
                          36            0
                        </tableData>
                    </table>
                </product>
            </function>
        </axis>
        <axis name="DRAG" unit="LBS">
            <function name="aero/force/Drag_basic">
                <description>Drag at zero lift</description>
                <product>
                    <property>aero/qbar-psf</property>
                    <property>metrics/Sw-sqft</property>
                    <property>aero/function/cx</property>
                </product>
            </function>
            <function name="aero/force/Drag_gear">
                <description>Drag due to gear</description>
                <product>
                    <property>aero/qbar-psf</property>
                    <property>metrics/Sw-sqft</property>
                    <property>gear/gear-pos-norm</property>
                    <value>0.014</value>
                </product>
            </function>
            <function name="aero/force/Drag_beta">
                <description>Drag due to sideslip</description>
                <product>
                    <property>aero/qbar-psf</property>
                    <property>metrics/Sw-sqft</property>
                    <table>
                        <independentVar>aero/beta-rad</independentVar>
                        <tableData>
                          -1.57         1.23
                          -0.26         0.05
                          -0.14         0.018
                          -0.13         0.014
                          -0.105        0.008
                          -0.07         0.004
                          0             0
                          0.07          0.004
                          0.105         0.008
                          0.13          0.014
                          0.14          0.018
                          0.26          0.05
                          1.57          1.23
                        </tableData>
                    </table>
                </product>
            </function>
            <function name="aero/force/Drag_rudder">
                <description>Drag due to rudder deflection</description>
                <product>
                    <property>aero/qbar-psf</property>
                    <property>metrics/Sw-sqft</property>
                    <abs>
                       <property>fcs/rudder-pos-rad</property>
                    </abs>
                    <abs>
                       <property>fcs/rudder-pos-rad</property>
                    </abs>
                    <value>0.075</value>
                </product>
            </function>
            <function name="aero/force/Drag_ailerons">
                <description>Drag due to ailerons deflection</description>
                <product>
                    <property>aero/qbar-psf</property>
                    <property>metrics/Sw-sqft</property>
                    <abs>
                       <property>fcs/right-aileron-pos-norm</property>
                    </abs>
                    <abs>
                       <property>fcs/right-aileron-pos-norm</property>
                    </abs>
                    <value>0.01159</value>
                </product>
            </function>
            <function name="aero/force/Drag_elevator">
                <description>Drag due to Elevator Deflection</description>
                <product>
                    <property>aero/qbar-psf</property>
                    <property>metrics/Sw-sqft</property>
                    <abs>
                        <property>fcs/elevator-pos-norm</property>
                    </abs>
                    <value>0.04</value>
                </product>
            </function>
            <function name="aero/force/Drag_ground">
                <description>Drag reduction due to ground effect</description>
                <product>
                    <property>aero/qbar-psf</property>
                    <property>metrics/Sw-sqft</property>
                    <property>aero/function/cx_delta_ground</property>
                    <table>
                        <independentVar>position/h-agl-ft</independentVar>
                        <tableData>
                          0             1
                          36            0
                        </tableData>
                    </table>
                </product>
            </function>
        </axis>
        <axis name="SIDE" unit="LBS">
            <function name="aero/force/Side_beta">
                <description>Side force due to beta</description>
                <product>
                    <property>aero/qbar-psf</property>
                    <property>metrics/Sw-sqft</property>
                    <sum>
                      <product>
                        <property>aero/beta-rad</property>
                        <value>-0.716</value>
                      </product>
                      <product>
                        <property>fcs/rudder-pos-rad</property>
                        <value>0.1145</value>
                      </product>
                    </sum>
                </product>
            </function>
        </axis>
        <axis name="ROLL" unit="LBS*FT">
            <function name="aero/moment/Roll_beta">
                <description>Roll moment due to beta</description>
                <product>
                    <property>aero/qbar-psf</property>
                    <property>metrics/Sw-sqft</property>
                    <property>metrics/cbarw-ft</property>
                    <property>aero/beta-rad</property>
                    <value>-0.0722</value>
                </product>
            </function>
            <function name="aero/moment/Roll_damp">
                <description>Roll moment due to roll rate</description>
                <product>
                    <property>aero/qbar-psf</property>
                    <property>metrics/Sw-sqft</property>
                    <property>metrics/bw-ft</property>
                    <property>aero/bi2vel</property>
                    <property>velocities/p-aero-rad_sec</property>
                    <value>-0.4</value>
                </product>
            </function>
            <function name="aero/moment/Roll_yaw">
                <description>Roll moment due to yaw rate</description>
                <product>
                    <property>aero/qbar-psf</property>
                    <property>metrics/Sw-sqft</property>
                    <property>metrics/bw-ft</property>
                    <property>aero/bi2vel</property>
                    <property>velocities/r-aero-rad_sec</property>
                    <value>0.15</value>
                </product>
            </function>
            <function name="aero/moment/Roll_aileron_left">
                <description>Roll moment due to aileron</description>
                <product>
                    <property>aero/qbar-psf</property>
                    <property>metrics/Sw-sqft</property>
                    <property>metrics/bw-ft</property>
                    <property>fcs/left-aileron-pos-rad</property>
                    <value>0.075</value>
                </product>
            </function>
            <function name="aero/moment/Roll_aileron_right">
                <description>Roll moment due to aileron</description>
                <product>
                    <property>aero/qbar-psf</property>
                    <property>metrics/Sw-sqft</property>
                    <property>metrics/bw-ft</property>
                    <property>fcs/right-aileron-pos-rad</property>
                    <value>0.075</value>
                </product>
            </function>
            <function name="aero/moment/Roll_rudder">
                <description>Roll moment due to rudder</description>
                <product>
                    <property>aero/qbar-psf</property>
                    <property>metrics/Sw-sqft</property>
                    <property>metrics/bw-ft</property>
                    <property>fcs/rudder-pos-rad</property>
                    <value>0.01</value>
                </product>
            </function>
          <!--  <function name="aero/moment/Roll_experiment">
                <description>Yaw moment due to rudder</description>
                <product>
                    <property>aero/qbar-psf</property>
                    <property>metrics/Sw-sqft</property>
                    <property>metrics/cbarw-ft</property>
                    <property>aero/function/mx</property>
                </product>
            </function> -->
        </axis>
        <axis name="PITCH" unit="LBS*FT">
            <function name="aero/moment/Pitch_alpha">
                <description>Pitch moment due to alpha</description>
                <product>
                    <property>aero/qbar-psf</property>
                    <property>metrics/Sw-sqft</property>
                    <property>metrics/cbarw-ft</property>
                    <property>aero/function/mz</property>
                </product>
            </function>
            <function name="aero/moment/Pitch_anti_lift">
                <description>Pitch moment to match mz from book</description>
                <product>
                    <sum>
                       <property>aero/function/aero-ref-shift</property>
                       <value>-0.25</value>
                    </sum>
                    <property>metrics/cbarw-ft</property>
                    <sum>
                       <property>aero/force/Lift_alpha</property>
                       <property>aero/force/Lift_elevator</property>
                       <property>aero/force/Lift_alpha_ground</property>

                    </sum>
                </product>
            </function>
            <function name="aero/moment/Pitch_gear">
                <description>Pitch moment due to gear retraction</description>
                <product>
                    <property>aero/qbar-psf</property>
                    <property>metrics/Sw-sqft</property>
                    <property>metrics/cbarw-ft</property>
                    <value>-0.025</value>
                    <property>gear/gear-pos-norm</property>
                </product>
            </function>
            <function name="aero/moment/Pitch_elevator">
                <description>Pitch moment due to elevator</description>
                <product>
                    <property>aero/qbar-psf</property>
                    <property>metrics/Sw-sqft</property>
                    <property>metrics/cbarw-ft</property>
                    <property>fcs/elevator-pos-rad</property>
                    <table>
                        <independentVar>velocities/mach</independentVar>
                        <tableData>
                          0             -1.2
                          2             -1.2
                        </tableData>
                    </table>
                </product>
            </function>
            <function name="aero/moment/Pitch_damp">
                <description>Pitch moment due to pitch rate</description>
                <product>
                    <property>aero/qbar-psf</property>
                    <property>metrics/Sw-sqft</property>
                    <property>metrics/cbarw-ft</property>
                    <property>aero/ci2vel</property>
                    <property>velocities/q-aero-rad_sec</property>
                    <value>-22</value>
                </product>
            </function>
            <function name="aero/moment/Pitch_alphadot">
                <description>Pitch moment due to alpha rate</description>
                <product>
                    <property>aero/qbar-psf</property>
                    <property>metrics/Sw-sqft</property>
                    <property>metrics/cbarw-ft</property>
                    <property>aero/ci2vel</property>
                    <property>aero/alphadot-rad_sec</property>
                    <value>-8</value>
                </product>
            </function>
        </axis>
        <axis name="YAW" unit="LBS*FT">
            <function name="aero/moment/Yaw_damp">
                <description>Yaw moment due to yaw rate</description>
                <product>
                    <property>aero/qbar-psf</property>
                    <property>metrics/Sw-sqft</property>
                    <property>metrics/bw-ft</property>
                    <property>aero/bi2vel</property>
                    <property>velocities/r-aero-rad_sec</property>
                    <value>-0.15</value>
                </product>
            </function>
            <function name="aero/moment/Yaw_rudder_and_beta">
                <description>Yaw moment due to rudder and beta</description>
                <product>
                    <property>aero/qbar-psf</property>
                    <property>metrics/Sw-sqft</property>
                    <property>metrics/cbarw-ft</property>
                    <property>aero/function/my</property>
                    <value>1</value>
                </product>
            </function>
            <function name="aero/moment/Yaw_aileron_left">
                <description>Adverse yaw</description>
                <product>
                    <property>aero/qbar-psf</property>
                    <property>metrics/Sw-sqft</property>
                    <property>metrics/bw-ft</property>
                    <abs>
                      <property>fcs/left-aileron-pos-rad</property>
                    </abs>
                    <value>-0.004</value>
                </product>
            </function>
            <function name="aero/moment/Yaw_aileron_right">
                <description>Adverse yaw</description>
                <product>
                    <property>aero/qbar-psf</property>
                    <property>metrics/Sw-sqft</property>
                    <property>metrics/bw-ft</property>
                    <abs>
                      <property>fcs/right-aileron-pos-rad</property>
                    </abs>
                    <value>0.004</value>
                </product>
            </function>
            <function name="aero/moment/Yaw_anti_side">
                <description>Yaw moment to match my from book</description>
                <product>
                    <sum>
                       <property>aero/function/aero-ref-shift</property>
                       <value>-0.25</value>
                    </sum>
                    <property>metrics/cbarw-ft</property>
                    <sum>
                       <property>aero/force/Side_beta</property>
                    </sum>
                </product>
            </function>
        </axis>
    </aerodynamics>

   <!-- <output name="JSBout.csv" type="CSV" rate="100">
        <simulation> OFF </simulation>
        <atmosphere> OFF </atmosphere>
        <massprops> OFF </massprops>
        <aerosurfaces> OFF </aerosurfaces>
        <rates> OFF </rates>
        <velocities> OFF </velocities>
        <forces> OFF </forces>
        <moments> OFF </moments>
        <position> OFF </position>
        <coefficients> OFF </coefficients>
        <ground_reactions> OFF </ground_reactions>
        <fcs> OFF </fcs>
        <propulsion> OFF </propulsion>
    </output> -->
</fdm_config>
